*Heading
** Job name: Job-2 Model name: FuzhouHouyuRoad
** Generated by: Abaqus/CAE 6.14-1
*Preprint, echo=NO, model=NO, history=NO, contact=NO
**
** PARTS
**
*Part, name=BridgeDeck
*End Part
**
**
** ASSEMBLY
**
*Assembly, name=Assembly
**
*Instance, name=Plate-1, part=BridgeDeck
*Node
      1,          11.,         15.5,           0.
      2,          11.,           0.,           0.
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*Element, type=S4R
   1,    1,    7,  450,  266
   2,    7,    8,  451,  450
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*Nset, nset=_PickedSet2, internal, generate
    1,  8624,     1
*Elset, elset=_PickedSet2, internal, generate
    1,  8436,     1
** Section: DeckSection
*Shell General Section, elset=_PickedSet2, material=C40
0.5,
*End Instance
**
*Node
      1,          0.5,           3.,           0.
*Node
      2,           1.,           3.,           0.
*Node
      3,          1.5,           3.,           0.
*Node
      4,           2.,           3.,           0.
*Node
      5,          2.5,           3.,           0.
*Node
      6,           3.,           3.,           0.
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*Nset, nset=End-1, instance=Plate-1
   5,   6, 321, 322, 323, 324
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*Elset, elset=End-1, instance=Plate-1, generate
 8361,  8436,     1
*Nset, nset=End-2, instance=Plate-1
  1,  2,  7,  8,  9, 10
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*Elset, elset=End-2, instance=Plate-1
    1,    2,    3,    4,    5,    6
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*Nset, nset=End-3, instance=Plate-1
   3,   4, 137, 138, 139, 140
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*Elset, elset=End-3, instance=Plate-1, generate
 4181,  4256,     1
*Nset, nset=m_Set-30
 43,
*Nset, nset=_PickedSet10, internal
 1,
*Nset, nset=_PickedSet15, internal
 2,
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*Nset, nset=_PickedSet220, internal
 43,
*Elset, elset=_s_Surf-30_SPOS, internal, instance=Plate-1, generate
    1,  4256,     1
*Surface, type=ELEMENT, name=s_Surf-30
_s_Surf-30_SPOS, SPOS
** Constraint: Constraint-RP1
*Coupling, constraint name=Constraint-RP1, ref node=m_Set-30, surface=s_Surf-30, influence radius=0.1
*Distributing, weighting method=UNIFORM
*End Assembly
**
** MATERIALS
**
*Material, name=C30
*Elastic
 3e+10, 0.2
*Material, name=C40
*Elastic
 3.25e+10, 0.2
** ----------------------------------------------------------------
**
** STEP: ApplyLoad
**
*Step, name=ApplyLoad, nlgeom=NO
*Static
1., 1., 1e-05, 1.
**
** BOUNDARY CONDITIONS
**
** Name: BC-1 Type: Displacement/Rotation
*Boundary
End-1, 1, 1
End-1, 2, 2
End-1, 3, 3
End-1, 4, 4
End-1, 6, 6
** Name: BC-2 Type: Displacement/Rotation
*Boundary
End-2, 1, 1
End-2, 2, 2
End-2, 3, 3
End-2, 4, 4
End-2, 6, 6
** Name: BC-3 Type: Displacement/Rotation
*Boundary
End-3, 1, 1
End-3, 2, 2
End-3, 3, 3
End-3, 4, 4
End-3, 6, 6
**
** LOADS
**
** Name: Load-1   Type: Concentrated force
*Cload
_PickedSet220, 3, -1.
**
** OUTPUT REQUESTS
**
*Restart, write, frequency=0
**
** FIELD OUTPUT: F-Output-1
**
*Output, field
*Node Output
CF, RF, U
*Element Output, directions=YES
LE, PE, PEEQ, PEMAG, S, SF
*Contact Output
CDISP, CSTRESS
**
** HISTORY OUTPUT: H-Output-1
**
*Output, history, variable=PRESELECT
*End Step
